# OpenSim document version 40500
Model vstavani_schody_exo_cnn_mala_rychla:
  gravity: 0 -9.80665 0
  length_units: meters
  force_units: N
  credits:
    Delp S.L., Loan J.P., Hoy M.G., Zajac F.E., Topp E.L., Rosen J.M., Thelen D.G., Anderson F.C., Seth A. Notes: 3D, 23 DOF gait model created by D.G. Thelen, Univ. of Wisconsin-Madison, and Ajay Seth, Frank C. Anderson, and Scott L. Delp, Stanford University. Lower extremity joint defintions based on Delp et al. (1990). Low back joint and anthropometry based on Anderson and Pandy (1999, 2001). Planar knee model of Yamaguchi and Zajac (1989). Seth replaced tibia translation constraints with a CustomJoint for the knee and removed the patella to eliminate all kinematic constraints; insertions of the quadrucepts are handled with moving points in the tibia frame as defined by Delp 1990. Number of muscles was reduced by Anderson to improve simulation speed for demonstrations and is not intended to be used in research. License: Creative Commons (CCBY 3.0). You are free to distribute, remix, tweak, and build upon this work, even commercially, as long as you credit us for the original creation. http://creativecommons.org/licenses/by/3.0/ More Information: http://simtk-confluence.stanford.edu:8080/display/OpenSim/Gait+2392+and+2354+Models
  publications:
    Delp, S.L., Loan, J.P., Hoy, M.G., Zajac, F.E., Topp E.L., Rosen, J.M.: An interactive graphics-based model of the lower extremity to study orthopaedic surgical procedures, IEEE Transactions on Biomedical Engineering, vol. 37, pp. 757-767, 1990. Yamaguchi G.T., Zajac F.E.: A planar model of the knee joint to characterize the knee extensor mechanism." J . Biomech. vol. 22. pp. 1-10. 1989. Anderson F.C., Pandy M.G.: A dynamic optimization solution for vertical jumping in three dimensions. Computer Methods in Biomechanics and Biomedical Engineering 2:201-231, 1999. Anderson F.C., Pandy M.G.: Dynamic optimization of human walking. Journal of Biomechanical Engineering 123:381-390, 2001.
  PhysicalOffsetFrame trat_nahoru_01: socket_parent=/ground translation=(5.145 0.085 0) [meters]
    Brick trat_nahoru_01_geom_1: half_lengths=(0.145 0.085 0.6)
  PhysicalOffsetFrame trat_nahoru_02: socket_parent=/ground translation=(5.435 0.17 0)
    Brick trat_nahoru_02_geom_1: half_lengths=(0.145 0.17 0.6)
  PhysicalOffsetFrame trat_nahoru_03: socket_parent=/ground translation=(5.725 0.255 0)
    Brick trat_nahoru_03_geom_1: half_lengths=(0.145 0.255 0.6)
  PhysicalOffsetFrame trat_nahoru_04: socket_parent=/ground translation=(6.015 0.34 0)
    Brick trat_nahoru_04_geom_1: half_lengths=(0.145 0.34 0.6)
  PhysicalOffsetFrame trat_nahoru_05: socket_parent=/ground translation=(6.305 0.425 0)
    Brick trat_nahoru_05_geom_1: half_lengths=(0.145 0.425 0.6)
  PhysicalOffsetFrame trat_nahoru_06: socket_parent=/ground translation=(6.595 0.51 0)
    Brick trat_nahoru_06_geom_1: half_lengths=(0.145 0.51 0.6)
  PhysicalOffsetFrame trat_nahoru_07: socket_parent=/ground translation=(6.885 0.595 0)
    Brick trat_nahoru_07_geom_1: half_lengths=(0.145 0.595 0.6)
  PhysicalOffsetFrame trat_nahoru_08: socket_parent=/ground translation=(7.175 0.68 0)
    Brick trat_nahoru_08_geom_1: half_lengths=(0.145 0.68 0.6)
  PhysicalOffsetFrame trat_nahoru_09: socket_parent=/ground translation=(7.465 0.765 0)
    Brick trat_nahoru_09_geom_1: half_lengths=(0.145 0.765 0.6)
  PhysicalOffsetFrame trat_nahoru_10: socket_parent=/ground translation=(7.755 0.85 0)
    Brick trat_nahoru_10_geom_1: half_lengths=(0.145 0.85 0.6)
  PhysicalOffsetFrame trat_nahoru_11: socket_parent=/ground translation=(8.045 0.935 0)
    Brick trat_nahoru_11_geom_1: half_lengths=(0.145 0.935 0.6)
  PhysicalOffsetFrame trat_nahoru_12: socket_parent=/ground translation=(8.335 1.02 0)
    Brick trat_nahoru_12_geom_1: half_lengths=(0.145 1.02 0.6)
  PhysicalOffsetFrame trat_nahoru_13: socket_parent=/ground translation=(8.625 1.105 0)
    Brick trat_nahoru_13_geom_1: half_lengths=(0.145 1.105 0.6)
  PhysicalOffsetFrame trat_nahoru_14: socket_parent=/ground translation=(8.915 1.19 0)
    Brick trat_nahoru_14_geom_1: half_lengths=(0.145 1.19 0.6)
  PhysicalOffsetFrame trat_nahoru_15: socket_parent=/ground translation=(9.205 1.275 0)
    Brick trat_nahoru_15_geom_1: half_lengths=(0.145 1.275 0.6)
  PhysicalOffsetFrame trat_nahoru_16: socket_parent=/ground translation=(9.495 1.36 0)
    Brick trat_nahoru_16_geom_1: half_lengths=(0.145 1.36 0.6)
  PhysicalOffsetFrame trat_podesta: socket_parent=/ground translation=(10.09 1.445 0)
    Brick trat_podesta_geom_1: half_lengths=(0.45 1.445 0.6)
  PhysicalOffsetFrame trat_dolu_01: socket_parent=/ground translation=(10.685 1.36 0)
    Brick trat_dolu_01_geom_1: half_lengths=(0.145 1.36 0.6)
  PhysicalOffsetFrame trat_dolu_02: socket_parent=/ground translation=(10.975 1.275 0)
    Brick trat_dolu_02_geom_1: half_lengths=(0.145 1.275 0.6)
  PhysicalOffsetFrame trat_dolu_03: socket_parent=/ground translation=(11.265 1.19 0)
    Brick trat_dolu_03_geom_1: half_lengths=(0.145 1.19 0.6)
  PhysicalOffsetFrame trat_dolu_04: socket_parent=/ground translation=(11.555 1.105 0)
    Brick trat_dolu_04_geom_1: half_lengths=(0.145 1.105 0.6)
  PhysicalOffsetFrame trat_dolu_05: socket_parent=/ground translation=(11.845 1.02 0)
    Brick trat_dolu_05_geom_1: half_lengths=(0.145 1.02 0.6)
  PhysicalOffsetFrame trat_dolu_06: socket_parent=/ground translation=(12.135 0.935 0)
    Brick trat_dolu_06_geom_1: half_lengths=(0.145 0.935 0.6)
  PhysicalOffsetFrame trat_dolu_07: socket_parent=/ground translation=(12.425 0.85 0)
    Brick trat_dolu_07_geom_1: half_lengths=(0.145 0.85 0.6)
  PhysicalOffsetFrame trat_dolu_08: socket_parent=/ground translation=(12.715 0.765 0)
    Brick trat_dolu_08_geom_1: half_lengths=(0.145 0.765 0.6)
  PhysicalOffsetFrame trat_dolu_09: socket_parent=/ground translation=(13.005 0.68 0)
    Brick trat_dolu_09_geom_1: half_lengths=(0.145 0.68 0.6)
  PhysicalOffsetFrame trat_dolu_10: socket_parent=/ground translation=(13.295 0.595 0)
    Brick trat_dolu_10_geom_1: half_lengths=(0.145 0.595 0.6)
  PhysicalOffsetFrame trat_dolu_11: socket_parent=/ground translation=(13.585 0.51 0)
    Brick trat_dolu_11_geom_1: half_lengths=(0.145 0.51 0.6)
  PhysicalOffsetFrame trat_dolu_12: socket_parent=/ground translation=(13.875 0.425 0)
    Brick trat_dolu_12_geom_1: half_lengths=(0.145 0.425 0.6)
  PhysicalOffsetFrame trat_dolu_13: socket_parent=/ground translation=(14.165 0.34 0)
    Brick trat_dolu_13_geom_1: half_lengths=(0.145 0.34 0.6)
  PhysicalOffsetFrame trat_dolu_14: socket_parent=/ground translation=(14.455 0.255 0)
    Brick trat_dolu_14_geom_1: half_lengths=(0.145 0.255 0.6)
  PhysicalOffsetFrame trat_dolu_15: socket_parent=/ground translation=(14.745 0.17 0)
    Brick trat_dolu_15_geom_1: half_lengths=(0.145 0.17 0.6)
  PhysicalOffsetFrame trat_dolu_16: socket_parent=/ground translation=(15.035 0.085 0)
    Brick trat_dolu_16_geom_1: half_lengths=(0.145 0.085 0.6)
  PhysicalOffsetFrame zidle_sedak: socket_parent=/ground translation=(-0.3979935 0.435 0)
    Brick zidle_sedak_geom_1: half_lengths=(0.21 0.025 0.24)
  PhysicalOffsetFrame zidle_operadlo: socket_parent=/ground translation=(-0.5879935 0.71 0)
    Brick zidle_operadlo_geom_1: half_lengths=(0.02 0.25 0.24)
  PhysicalOffsetFrame zidle_noha_0: socket_parent=/ground translation=(-0.5779935 0.205 -0.2)
    Brick zidle_noha_0_geom_1: half_lengths=(0.02 0.205 0.02)
  PhysicalOffsetFrame zidle_noha_1: socket_parent=/ground translation=(-0.5779935 0.205 0.2)
    Brick zidle_noha_1_geom_1: half_lengths=(0.02 0.205 0.02)
  PhysicalOffsetFrame zidle_noha_2: socket_parent=/ground translation=(-0.2179935 0.205 -0.2)
    Brick zidle_noha_2_geom_1: half_lengths=(0.02 0.205 0.02)
  PhysicalOffsetFrame zidle_noha_3: socket_parent=/ground translation=(-0.2179935 0.205 0.2)
    Brick zidle_noha_3_geom_1: half_lengths=(0.02 0.205 0.02)
  Ground
  BodySet:
    Body pelvis: mass=8.774237 [kg] mass_center=(-0.06398541 0 0) inertia=(0.06273244 0.05315153 0.03533266 0 0 0)
        meshes=(sacrum.vtp pelvis.vtp l_pelvis.vtp)
    Body femur_r: mass=6.929837 mass_center=(0 -0.1722738 0) inertia=(0.1024462 0.02685481 0.1080313 0 0 0)
        meshes=femur_r.vtp
    Body tibia_r: mass=2.762205 mass_center=(0 -0.163022 0) inertia=(0.02862928 0.00289701 0.02902692 0 0 0)
        meshes=(tibia_r.vtp fibula.vtp)
    Body talus_r: mass=0.07450316 mass_center=(0 0 0) inertia=(0.0007213743 0.0007213743 0.0007213743 0 0 0)
        meshes=talus.vtp
    Body calcn_r: mass=0.9312895 mass_center=(0.09072353 0.02721706 0)
        inertia=(0.0008585041 0.002391547 0.002514191 0 0 0) meshes=foot.vtp
    Body toes_r: mass=0.1613738 mass_center=(0.03139037 0.005443412 -0.01587662)
        inertia=(6.132172e-5 0.0001226434 6.132172e-5 0 0 0) meshes=bofoot.vtp
    Body femur_l: mass=6.929837 mass_center=(0 -0.1722738 0) inertia=(0.1024462 0.02685481 0.1080313 0 0 0)
        meshes=femur_l.vtp
    Body tibia_l: mass=2.762205 mass_center=(0 -0.163022 0) inertia=(0.02862928 0.00289701 0.02902692 0 0 0)
        meshes=(tibia_l.vtp l_fibula.vtp)
    Body talus_l: mass=0.07450316 mass_center=(0 0 0) inertia=(0.0007213743 0.0007213743 0.0007213743 0 0 0)
        meshes=l_talus.vtp
    Body calcn_l: mass=0.9312895 mass_center=(0.09072353 0.02721706 0)
        inertia=(0.0008585041 0.002391547 0.002514191 0 0 0) meshes=l_foot.vtp
    Body toes_l: mass=0.1613738 mass_center=(0.03139037 0.005443412 0.01587662)
        inertia=(6.132172e-5 0.0001226434 6.132172e-5 0 0 0) meshes=l_bofoot.vtp
    Body torso: mass=25.50735 mass_center=(-0.02861199 0.3051942 0) inertia=(0.9992449 0.5119915 0.9700375 0 0 0)
        meshes=(hat_spine.vtp hat_jaw.vtp hat_skull.vtp hat_ribs.vtp)
    Body exo_thigh_r: mass=1.342043 mass_center=(0.007415397 0.04706714 0.05174203)
        inertia=(0.01265209 0.005646944 0.008676123 -0.001309989 0.0003168935 0.002125726)
        meshes=(exo_pohon.stl exo_elektronika.stl exo_rameno_stehna_lat.stl exo_rameno_stehna_med.stl exo_kloub_med_stehno.stl exo_objimka_stehna.stl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)
    Body exo_shank_r: mass=0.4175426 mass_center=(-0.01246125 -0.08466749 0.007691066)
        inertia=(0.003109027 0.001387554 0.002092713 -0.0003229403 5.731536e-6 2.535502e-5)
        meshes=(exo_vystupni_priruba.stl exo_rameno_berce_lat.stl exo_rameno_berce_med.stl exo_kloub_med_berce.stl exo_objimka_berce.stl exo_vystelka_berce.stl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)
  JointSet:
    CustomJoint ground_pelvis: socket_parent_frame=ground_offset socket_child_frame=pelvis_offset
      Coordinate pelvis_tilt: default_value=0 range=(-1.570796 1.570796) clamped=false
      Coordinate pelvis_tx: default_value=0 range=(-5 5) clamped=false
      Coordinate pelvis_ty: default_value=1.015 range=(-1 2) clamped=false
      PhysicalOffsetFrame ground_offset: socket_parent=/ground translation=(0 0 0)
      PhysicalOffsetFrame pelvis_offset: socket_parent=/bodyset/pelvis translation=(0 0 0)
      SpatialTransform: axes_held_at_zero=(rotation2 rotation3 translation3)
        TransformAxis rotation1: coordinates=pelvis_tilt axis=(0 0 1) LinearFunction(coefficients=1 0)
        TransformAxis translation1: coordinates=pelvis_tx axis=(1 0 0) LinearFunction(coefficients=1 0)
        TransformAxis translation2: coordinates=pelvis_ty axis=(0 1 0) LinearFunction(coefficients=1 0)
    PinJoint hip_r: socket_parent_frame=pelvis_offset socket_child_frame=femur_r_offset
      Coordinate hip_flexion_r: default_value=0 range=(-2.094395 2.094395) clamped=false
      PhysicalOffsetFrame pelvis_offset: socket_parent=/bodyset/pelvis translation=(-0.06398541 -0.05982225 0.07556973)
      PhysicalOffsetFrame femur_r_offset: socket_parent=/bodyset/femur_r translation=(0 0 0)
    CustomJoint knee_r: socket_parent_frame=femur_r_offset socket_child_frame=tibia_r_offset
      Coordinate knee_angle_r: default_value=0 range=(-2.094395 0.1745329) clamped=false
      PhysicalOffsetFrame femur_r_offset: socket_parent=/bodyset/femur_r translation=(0 0 0)
      PhysicalOffsetFrame tibia_r_offset: socket_parent=/bodyset/tibia_r translation=(0 0 0)
      SpatialTransform: axes_held_at_zero=(rotation2 rotation3 translation3)
        TransformAxis rotation1: coordinates=knee_angle_r axis=(0 0 1) LinearFunction(coefficients=1 0)
        TransformAxis translation1: coordinates=knee_angle_r axis=(1 0 0)
          MultiplierFunction: scale=1.013374
            SimmSpline: x=(-2.0944 -1.74533 -1.39626 -1.0472 -0.698132 -0.349066 -0.174533 0.197344 0.337395 0.490178 1.52146 2.0944)
                y=(-0.0032 0.00179 0.00411 0.0041 0.00212 -0.001 -0.0031 -0.005227 -0.005435 -0.005574 -0.005435 -0.00525)
        TransformAxis translation2: coordinates=knee_angle_r axis=(0 1 0)
          MultiplierFunction: scale=1.013374
            SimmSpline: x=(-2.0944 -1.22173 -0.523599 -0.349066 -0.174533 0.159149 2.0944)
                y=(-0.4226 -0.4082 -0.399 -0.3976 -0.3966 -0.395264 -0.396)
    PinJoint ankle_r: socket_parent_frame=tibia_r_offset socket_child_frame=talus_r_offset
      Coordinate ankle_angle_r: default_value=0 range=(-1.570796 1.570796) clamped=false
      PhysicalOffsetFrame tibia_r_offset: socket_parent=/bodyset/tibia_r translation=(0 -0.3754664 0)
      PhysicalOffsetFrame talus_r_offset: socket_parent=/bodyset/talus_r translation=(0 0 0)
    WeldJoint subtalar_r: socket_parent_frame=talus_r_offset socket_child_frame=calcn_r_offset
      PhysicalOffsetFrame talus_r_offset: socket_parent=/bodyset/talus_r
          translation=(-0.04798945 -0.04127864 0.007793242)
      PhysicalOffsetFrame calcn_r_offset: socket_parent=/bodyset/calcn_r translation=(0 0 0)
    WeldJoint mtp_r: socket_parent_frame=calcn_r_offset socket_child_frame=toes_r_offset
      PhysicalOffsetFrame calcn_r_offset: socket_parent=/bodyset/calcn_r
          translation=(0.1622138 -0.001814471 0.0009798173)
      PhysicalOffsetFrame toes_r_offset: socket_parent=/bodyset/toes_r translation=(0 0 0)
    PinJoint hip_l: socket_parent_frame=pelvis_offset socket_child_frame=femur_l_offset
      Coordinate hip_flexion_l: default_value=0 range=(-2.094395 2.094395) clamped=false
      PhysicalOffsetFrame pelvis_offset: socket_parent=/bodyset/pelvis
          translation=(-0.06398541 -0.05982225 -0.07556973)
      PhysicalOffsetFrame femur_l_offset: socket_parent=/bodyset/femur_l translation=(0 0 0)
    CustomJoint knee_l: socket_parent_frame=femur_l_offset socket_child_frame=tibia_l_offset
      Coordinate knee_angle_l: default_value=0 range=(-2.094395 0.1745329) clamped=false
      PhysicalOffsetFrame femur_l_offset: socket_parent=/bodyset/femur_l translation=(0 0 0)
      PhysicalOffsetFrame tibia_l_offset: socket_parent=/bodyset/tibia_l translation=(0 0 0)
      SpatialTransform: axes_held_at_zero=(rotation2 rotation3 translation3)
        TransformAxis rotation1: coordinates=knee_angle_l axis=(0 0 1) LinearFunction(coefficients=1 0)
        TransformAxis translation1: coordinates=knee_angle_l axis=(1 0 0)
          MultiplierFunction: scale=1.013374
            SimmSpline: x=(-2.0944 -1.74533 -1.39626 -1.0472 -0.698132 -0.349066 -0.174533 0.197344 0.337395 0.490178 1.52146 2.0944)
                y=(-0.0032 0.00179 0.00411 0.0041 0.00212 -0.001 -0.0031 -0.005227 -0.005435 -0.005574 -0.005435 -0.00525)
        TransformAxis translation2: coordinates=knee_angle_l axis=(0 1 0)
          MultiplierFunction: scale=1.013374
            SimmSpline: x=(-2.0944 -1.22173 -0.523599 -0.349066 -0.174533 0.159149 2.0944)
                y=(-0.4226 -0.4082 -0.399 -0.3976 -0.3966 -0.395264 -0.396)
    PinJoint ankle_l: socket_parent_frame=tibia_l_offset socket_child_frame=talus_l_offset
      Coordinate ankle_angle_l: default_value=0 range=(-1.570796 1.570796) clamped=false
      PhysicalOffsetFrame tibia_l_offset: socket_parent=/bodyset/tibia_l translation=(0 -0.3754664 0)
      PhysicalOffsetFrame talus_l_offset: socket_parent=/bodyset/talus_l translation=(0 0 0)
    WeldJoint subtalar_l: socket_parent_frame=talus_l_offset socket_child_frame=calcn_l_offset
      PhysicalOffsetFrame talus_l_offset: socket_parent=/bodyset/talus_l
          translation=(-0.04798945 -0.04127864 -0.007793242)
      PhysicalOffsetFrame calcn_l_offset: socket_parent=/bodyset/calcn_l translation=(0 0 0)
    WeldJoint mtp_l: socket_parent_frame=calcn_l_offset socket_child_frame=toes_l_offset
      PhysicalOffsetFrame calcn_l_offset: socket_parent=/bodyset/calcn_l
          translation=(0.1622138 -0.001814471 -0.0009798173)
      PhysicalOffsetFrame toes_l_offset: socket_parent=/bodyset/toes_l translation=(0 0 0)
    PinJoint back: socket_parent_frame=pelvis_offset socket_child_frame=torso_offset
      Coordinate lumbar_extension: default_value=0 range=(-1.570796 1.570796) clamped=false
      PhysicalOffsetFrame pelvis_offset: socket_parent=/bodyset/pelvis translation=(-0.09113604 0.07375973 0)
      PhysicalOffsetFrame torso_offset: socket_parent=/bodyset/torso translation=(0 0 0)
    WeldJoint exo_thigh_r_upevneni: socket_parent_frame=femur_r_offset socket_child_frame=exo_thigh_r_offset
      PhysicalOffsetFrame femur_r_offset: socket_parent=/bodyset/femur_r translation=(-0.01085088 -0.4141803 0)
      PhysicalOffsetFrame exo_thigh_r_offset: socket_parent=/bodyset/exo_thigh_r translation=(0 0 0)
    WeldJoint exo_shank_r_upevneni: socket_parent_frame=tibia_r_offset socket_child_frame=exo_shank_r_offset
      PhysicalOffsetFrame tibia_r_offset: socket_parent=/bodyset/tibia_r translation=(-0.005255167 -0.01415931 0)
      PhysicalOffsetFrame exo_shank_r_offset: socket_parent=/bodyset/exo_shank_r translation=(0 0 0)
  ControllerSet:
    PrescribedController exo_ridici_jednotka: actuator_list=exo_motor
      FunctionSet ControlFunctions:
        PiecewiseLinearFunction: x=(0 0.005 0.01 0.015 0.02 0.025 0.03 0.035 0.04 0.045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)
            y=(0 0 0 0 0 0 0 0 0 0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)
  ForceSet:
    Millard2012EquilibriumMuscle [values shared by the 18 below unless stated]: optimal_force=1
        max_contraction_velocity=10 activation_time_constant=0.01 [seconds] deactivation_time_constant=0.04 [seconds]
        minimum_activation=0.01
      ActiveForceLengthCurve: minimum_value=0
      ForceVelocityCurve: concentric_slope_at_vmax=0 concentric_slope_near_vmax=0.25 isometric_slope=5
          eccentric_slope_at_vmax=0 eccentric_slope_near_vmax=0.15 max_eccentric_velocity_force_multiplier=1.4
      FiberForceLengthCurve
      TendonForceLengthCurve
    Millard2012EquilibriumMuscle hamstrings_r: max_isometric_force=2700 optimal_fiber_length=0.1092052
        tendon_slack_length=0.3266137 pennation_angle_at_optimal=0 [radians]
      PathPoint bifemlh_r-P1: pelvis (-0.1139971 -0.09282847 0.06284487)
      PathPoint bifemlh_r-P2: tibia_r (-0.0262826 -0.03143436 0.02569758)
      PathPoint bifemlh_r-P3: tibia_r (-0.02043232 -0.04915985 0.02994995)
    Millard2012EquilibriumMuscle bifemsh_r: max_isometric_force=804 optimal_fiber_length=0.1691062
        tendon_slack_length=0.08699682 pennation_angle_at_optimal=0.4014257
      PathPoint P1: femur_r (0.005066872 -0.213923 0.02371295)
      PathPoint P2: tibia_r (-0.0262826 -0.03143436 0.02569758)
      PathPoint P3: tibia_r (-0.02043232 -0.04915985 0.02994995)
    Millard2012EquilibriumMuscle glut_max_r: max_isometric_force=1944 optimal_fiber_length=0.1407958
        tendon_slack_length=0.1216399 pennation_angle_at_optimal=0
      PathPoint P1: pelvis (-0.1220874 0.01592847 0.05095289)
      PathPoint P2: pelvis (-0.1245315 -0.04706126 0.0827192)
      PathPoint P3: femur_r (-0.04316973 -0.05370883 0.02969184)
      PathPoint P4: femur_r (-0.0158086 -0.1029592 0.04246043)
    Millard2012EquilibriumMuscle iliopsoas_r: max_isometric_force=2342 optimal_fiber_length=0.09290028
        tendon_slack_length=0.1486404 pennation_angle_at_optimal=0.1396263
      PathPoint psoas_r-P1: pelvis (-0.05855505 0.08027568 0.02615523)
      PathPoint psoas_r-P2: pelvis (-0.02153955 -0.0515864 0.06869136)
      ConditionalPathPoint psoas_r-P3: pelvis (-0.02606469 -0.07285451 0.07385001)
          socket_coordinate=/jointset/hip_r/hip_flexion_r range=(-1.5708 0.785398) [radians]
      PathPoint psoas_r-P4: femur_r (0.001621396 -0.05137811 0.003850821)
      PathPoint psoas_r-P5: femur_r (-0.01905143 -0.06049843 0.0105391)
    Millard2012EquilibriumMuscle rect_fem_r: max_isometric_force=1169 optimal_fiber_length=0.1152394
        tendon_slack_length=0.3133702 pennation_angle_at_optimal=0.08726646
      PathPoint P1: pelvis (-0.0266982 -0.02814622 0.0876064)
      ConditionalPathPoint P2: femur_r (0.03384669 -0.4083902 0.001925415)
          socket_coordinate=/jointset/knee_r/knee_angle_r range=(-2.61799 -1.45997)
      MovingPathPoint P3: tibia_r socket_x_coordinate=/jointset/knee_r/knee_angle_r
          socket_y_coordinate=/jointset/knee_r/knee_angle_r socket_z_coordinate=/jointset/knee_r/knee_angle_r
        x_location: MultiplierFunction: scale=0.8731774
          SimmSpline: x=(-2.0944 -1.99997 -1.5708 -1.45752 -1.39626 -1.0472 -0.698132 -0.526391 -0.349066 -0.174533 0 0.00017453 0.00034907 0.0279253 0.0872665 0.174533 2.0944)
              y=(0.0155805 0.0179938 0.0275081 0.0296564 0.0307615 0.0365695 0.0422074 0.0450902 0.048391 0.0534299 0.0617576 0.0617669 0.0617762 0.0633083 0.066994 0.0733035 0.0573481)
        y_location: MultiplierFunction: scale=0.8731774
          SimmSpline: x=(-2.0944 -1.99997 -1.5708 -1.45752 -1.39626 -1.0472 -0.698132 -0.526391 -0.349066 -0.174533 0 0.00017453 0.00034907 0.0279253 0.0872665 0.174533 2.0944)
              y=(0.0234116 0.0237613 0.0251141 0.0252795 0.0253146 0.0249184 0.0242373 0.0238447 0.0234197 0.0227644 0.020984 0.0209814 0.0209788 0.0205225 0.0191754 0.0159554 -0.0673774)
        z_location: MultiplierFunction: scale=0.8731774
          SimmSpline: x=(-2.0944 0.1745) y=(0.0014 0.0014)
    Millard2012EquilibriumMuscle vasti_r: max_isometric_force=5000 optimal_fiber_length=0.08954543
        tendon_slack_length=0.1399791 pennation_angle_at_optimal=0.05235988
      PathPoint vas_int_r-P1: femur_r (0.0293879 -0.1949733 0.03141457)
      PathPoint vas_int_r-P2: femur_r (0.03394801 -0.2111874 0.02888114)
      ConditionalPathPoint vas_int_r-P3: femur_r (0.03475872 -0.4083902 0.00557356)
          socket_coordinate=/jointset/knee_r/knee_angle_r range=(-2.61799 -1.42)
      MovingPathPoint vas_int_r-P4: tibia_r socket_x_coordinate=/jointset/knee_r/knee_angle_r
          socket_y_coordinate=/jointset/knee_r/knee_angle_r socket_z_coordinate=/jointset/knee_r/knee_angle_r
        x_location: MultiplierFunction: scale=0.8731774
          SimmSpline: x=(-2.0944 -1.99997 -1.5708 -1.45752 -1.39626 -1.0472 -0.698132 -0.526391 -0.349066 -0.174533 0 0.00017453 0.00034907 0.0279253 0.0872665 0.174533 2.0944)
              y=(0.0082733 0.0106866 0.0202042 0.022353 0.0234583 0.0292715 0.0349465 0.037871 0.0412569 0.0465287 0.0554632 0.0554735 0.0554837 0.0571717 0.061272 0.0684368 0.0648818)
        y_location: MultiplierFunction: scale=0.8731774
          SimmSpline: x=(-2.0944 -1.99997 -1.5708 -1.45752 -1.39626 -1.0472 -0.698132 -0.526391 -0.349066 -0.174533 0 0.00017453 0.00034907 0.0279253 0.0872665 0.174533 2.0944)
              y=(0.025599 0.0259487 0.0273124 0.0274796 0.0275151 0.0271363 0.0265737 0.0263073 0.0261187 0.0260129 0.0252923 0.0252911 0.0252898 0.0250526 0.0242191 0.0218288 -0.0685706)
        z_location: MultiplierFunction: scale=0.8731774
          SimmSpline: x=(-2.0944 2.0944) y=(0.0018 0.0018)
    Millard2012EquilibriumMuscle gastroc_r: max_isometric_force=2500 optimal_fiber_length=0.0530747
        tendon_slack_length=0.3449855 pennation_angle_at_optimal=0.296706
      PathPoint med_gas_r-P1: femur_r (-0.01925415 -0.3981552 -0.02381426)
      ConditionalPathPoint med_gas_r-P2: femur_r (-0.03040123 -0.4075793 -0.02614507)
          socket_coordinate=/jointset/knee_r/knee_angle_r range=(-0.785398 0.174533)
      PathPoint med_gas_r-P3: calcn_r (0 0.0281244 -0.00480837)
    Millard2012EquilibriumMuscle soleus_r: max_isometric_force=5137 optimal_fiber_length=0.04442086
        tendon_slack_length=0.2221043 pennation_angle_at_optimal=0.4363323
      PathPoint P1: tibia_r (-0.00209563 -0.1338585 0.006199556)
      PathPoint P2: calcn_r (0 0.0281244 -0.00480837)
    Millard2012EquilibriumMuscle tib_ant_r: max_isometric_force=3000 optimal_fiber_length=0.08648771
        tendon_slack_length=0.1968037 pennation_angle_at_optimal=0.08726646
      PathPoint P1: tibia_r (0.01562991 -0.1418039 0.01004153)
      PathPoint P2: tibia_r (0.02872753 -0.344992 -0.01545528)
      PathPoint P3: calcn_r (0.1057841 0.01614886 -0.02767082)
    Millard2012EquilibriumMuscle hamstrings_l: max_isometric_force=2700 optimal_fiber_length=0.1092052
        tendon_slack_length=0.3266137 pennation_angle_at_optimal=0
      PathPoint bifemlh_l-P1: pelvis (-0.1139971 -0.09282847 -0.06284487)
      PathPoint bifemlh_l-P2: tibia_l (-0.0262826 -0.03143436 -0.02569758)
      PathPoint bifemlh_l-P3: tibia_l (-0.02043232 -0.04915985 -0.02994995)
    Millard2012EquilibriumMuscle bifemsh_l: max_isometric_force=804 optimal_fiber_length=0.1691062
        tendon_slack_length=0.08699682 pennation_angle_at_optimal=0.4014257
      PathPoint P1: femur_l (0.005066872 -0.213923 -0.02371295)
      PathPoint P2: tibia_l (-0.0262826 -0.03143436 -0.02569758)
      PathPoint P3: tibia_l (-0.02043232 -0.04915985 -0.02994995)
    Millard2012EquilibriumMuscle glut_max_l: max_isometric_force=1944 optimal_fiber_length=0.1407958
        tendon_slack_length=0.1216399 pennation_angle_at_optimal=0
      PathPoint P1: pelvis (-0.1220874 0.01592847 -0.05095289)
      PathPoint P2: pelvis (-0.1245315 -0.04706126 -0.0827192)
      PathPoint P3: femur_l (-0.04316973 -0.05370883 -0.02969184)
      PathPoint P4: femur_l (-0.0158086 -0.1029592 -0.04246043)
    Millard2012EquilibriumMuscle iliopsoas_l: max_isometric_force=2342 optimal_fiber_length=0.09290028
        tendon_slack_length=0.1486404 pennation_angle_at_optimal=0.1396263
      PathPoint psoas_l-P1: pelvis (-0.05855505 0.08027568 -0.02615523)
      PathPoint psoas_l-P2: pelvis (-0.02153955 -0.0515864 -0.06869136)
      ConditionalPathPoint psoas_l-P3: pelvis (-0.02606469 -0.07285451 -0.07385001)
          socket_coordinate=/jointset/hip_l/hip_flexion_l range=(-1.5708 0.785398)
      PathPoint psoas_l-P4: femur_l (0.001621396 -0.05137811 -0.003850821)
      PathPoint psoas_l-P5: femur_l (-0.01905143 -0.06049843 -0.0105391)
    Millard2012EquilibriumMuscle rect_fem_l: max_isometric_force=1169 optimal_fiber_length=0.1152394
        tendon_slack_length=0.3133702 pennation_angle_at_optimal=0.08726646
      PathPoint P1: pelvis (-0.0266982 -0.02814622 -0.0876064)
      ConditionalPathPoint P2: femur_l (0.03384669 -0.4083902 -0.001925415)
          socket_coordinate=/jointset/knee_l/knee_angle_l range=(-2.61799 -1.45997)
      MovingPathPoint P3: tibia_l socket_x_coordinate=/jointset/knee_l/knee_angle_l
          socket_y_coordinate=/jointset/knee_l/knee_angle_l socket_z_coordinate=/jointset/knee_l/knee_angle_l
        x_location: MultiplierFunction: scale=0.8731774
          SimmSpline: x=(-2.0944 -1.99997 -1.5708 -1.45752 -1.39626 -1.0472 -0.698132 -0.526391 -0.349066 -0.174533 0 0.00017453 0.00034907 0.0279253 0.0872665 0.174533 2.0944)
              y=(0.0155805 0.0179938 0.0275081 0.0296564 0.0307615 0.0365695 0.0422074 0.0450902 0.048391 0.0534299 0.0617576 0.0617669 0.0617762 0.0633083 0.066994 0.0733035 0.0573481)
        y_location: MultiplierFunction: scale=0.8731774
          SimmSpline: x=(-2.0944 -1.99997 -1.5708 -1.45752 -1.39626 -1.0472 -0.698132 -0.526391 -0.349066 -0.174533 0 0.00017453 0.00034907 0.0279253 0.0872665 0.174533 2.0944)
              y=(0.0234116 0.0237613 0.0251141 0.0252795 0.0253146 0.0249184 0.0242373 0.0238447 0.0234197 0.0227644 0.020984 0.0209814 0.0209788 0.0205225 0.0191754 0.0159554 -0.0673774)
        z_location: MultiplierFunction: scale=0.8731774
          SimmSpline: x=(-2.0944 0.1745) y=(-0.0014 -0.0014)
    Millard2012EquilibriumMuscle vasti_l: max_isometric_force=5000 optimal_fiber_length=0.08954543
        tendon_slack_length=0.1399791 pennation_angle_at_optimal=0.05235988
      PathPoint vas_int_l-P1: femur_l (0.0293879 -0.1949733 -0.03141457)
      PathPoint vas_int_l-P2: femur_l (0.03394801 -0.2111874 -0.02888114)
      ConditionalPathPoint vas_int_l-P3: femur_l (0.03475872 -0.4083902 -0.00557356)
          socket_coordinate=/jointset/knee_l/knee_angle_l range=(-2.61799 -1.42)
      MovingPathPoint vas_int_l-P4: tibia_l socket_x_coordinate=/jointset/knee_l/knee_angle_l
          socket_y_coordinate=/jointset/knee_l/knee_angle_l socket_z_coordinate=/jointset/knee_l/knee_angle_l
        x_location: MultiplierFunction: scale=0.8731774
          SimmSpline: x=(-2.0944 -1.99997 -1.5708 -1.45752 -1.39626 -1.0472 -0.698132 -0.526391 -0.349066 -0.174533 0 0.00017453 0.00034907 0.0279253 0.0872665 0.174533 2.0944)
              y=(0.0082733 0.0106866 0.0202042 0.022353 0.0234583 0.0292715 0.0349465 0.037871 0.0412569 0.0465287 0.0554632 0.0554735 0.0554837 0.0571717 0.061272 0.0684368 0.0648818)
        y_location: MultiplierFunction: scale=0.8731774
          SimmSpline: x=(-2.0944 -1.99997 -1.5708 -1.45752 -1.39626 -1.0472 -0.698132 -0.526391 -0.349066 -0.174533 0 0.00017453 0.00034907 0.0279253 0.0872665 0.174533 2.0944)
              y=(0.025599 0.0259487 0.0273124 0.0274796 0.0275151 0.0271363 0.0265737 0.0263073 0.0261187 0.0260129 0.0252923 0.0252911 0.0252898 0.0250526 0.0242191 0.0218288 -0.0685706)
        z_location: MultiplierFunction: scale=0.8731774
          SimmSpline: x=(-2.0944 2.0944) y=(-0.0018 -0.0018)
    Millard2012EquilibriumMuscle gastroc_l: max_isometric_force=2500 optimal_fiber_length=0.0530747
        tendon_slack_length=0.3449855 pennation_angle_at_optimal=0.296706
      PathPoint med_gas_l-P1: femur_l (-0.01925415 -0.3981552 0.02381426)
      ConditionalPathPoint med_gas_l-P2: femur_l (-0.03040123 -0.4075793 0.02614507)
          socket_coordinate=/jointset/knee_l/knee_angle_l range=(-0.785398 0.174533)
      PathPoint med_gas_l-P3: calcn_l (0 0.0281244 0.00480837)
    Millard2012EquilibriumMuscle soleus_l: max_isometric_force=5137 optimal_fiber_length=0.04442086
        tendon_slack_length=0.2221043 pennation_angle_at_optimal=0.4363323
      PathPoint P1: tibia_l (-0.00209563 -0.1338585 -0.006199556)
      PathPoint P2: calcn_l (0 0.0281244 0.00480837)
    Millard2012EquilibriumMuscle tib_ant_l: max_isometric_force=3000 optimal_fiber_length=0.08648771
        tendon_slack_length=0.1968037 pennation_angle_at_optimal=0.08726646
      PathPoint P1: tibia_l (0.01562991 -0.1418039 -0.01004153)
      PathPoint P2: tibia_l (0.02872753 -0.344992 0.01545528)
      PathPoint P3: calcn_l (0.1057841 0.01614886 0.02767082)
    CoordinateActuator exo_motor: min_control=-100 max_control=100 coordinate=knee_angle_r optimal_force=1
  MarkerSet:
    Marker Sternum: torso (0.09151675 0.2759821 9.214567e-7)
    Marker R.Acromium: torso (-0.02196964 0.3766853 0.1489137)
    Marker L.Acromium: torso (-0.01944079 0.3893556 -0.1519046)
    Marker Top.Head: torso (0.052569 0.6179655 0.009276311)
    Marker R.ASIS: pelvis (0.02022695 0.0316778 0.1149334)
    Marker L.ASIS: pelvis (0.02573353 0.0244317 -0.116504)
    Marker V.Sacral: pelvis (-0.1520106 0.03533517 0.005475167)
    Marker R.Thigh.Upper: femur_r (0.04479432 -0.1944009 0.07807225)
    Marker R.Thigh.Front: femur_r (0.09531147 -0.2488714 -0.006095882)
    Marker R.Thigh.Rear: femur_r (0.03490058 -0.3011354 0.06974153)
    Marker R.Knee.Lat: femur_r (-0.0005179893 -0.3764972 0.05347687)
    Marker R.Knee.Med: femur_r (-0.00214673 -0.3912274 -0.05365981)
    Marker R.Shank.Upper: tibia_r (-0.02059352 -0.05331805 0.06247953)
    Marker R.Shank.Front: tibia_r (0.04564549 -0.08429459 0.0144021)
    Marker R.Shank.Rear: tibia_r (-0.006520315 -0.1285453 0.07066777)
    Marker R.Ankle.Lat: tibia_r (-0.004333041 -0.3805702 0.04851229)
    Marker R.Ankle.Med: tibia_r (0.002528569 -0.3677479 -0.03031979)
    Marker R.Heel: calcn_r (-0.01809197 0.01527111 -0.004449568)
    Marker R.Midfoot.Sup: calcn_r (0.1083898 0.02735256 -0.03562693)
    Marker R.Midfoot.Lat: calcn_r (0.1040245 0.009830414 0.05915791)
    Marker R.Toe.Lat: calcn_r (0.1834584 -0.01007924 0.06719105)
    Marker R.Toe.Med: calcn_r (0.1853319 0.001499931 -0.0285915)
    Marker R.Toe.Tip: calcn_r (0.2391434 0.002782487 -0.0005408512)
    Marker L.Thigh.Upper: femur_l (0.03166173 -0.1832791 -0.08237559)
    Marker L.Thigh.Front: femur_l (0.1007721 -0.2201018 -0.0155202)
    Marker L.Thigh.Rear: femur_l (0.02286991 -0.2793157 -0.06876891)
    Marker L.Knee.Lat: femur_l (-0.0006655895 -0.394084 -0.055027)
    Marker L.Knee.Med: femur_l (0.000417377 -0.3934568 0.04765538)
    Marker L.Shank.Upper: tibia_l (0.003520788 -0.06325508 -0.06864118)
    Marker L.Shank.Front: tibia_l (0.04252518 -0.1073546 -0.0197012)
    Marker L.Shank.Rear: tibia_l (-0.01169827 -0.1013507 -0.07817975)
    Marker L.Ankle.Lat: tibia_l (0.003386904 -0.3784573 -0.0480822)
    Marker L.Ankle.Med: tibia_l (0.006969445 -0.3578849 0.03261668)
    Marker L.Heel: calcn_l (-0.01997988 0.02372964 0.006944518)
    Marker L.Midfoot.Sup: calcn_l (0.1322376 0.02712175 0.03026291)
    Marker L.Midfoot.Lat: calcn_l (0.1159978 0.02700524 -0.05685281)
    Marker L.Toe.Lat: calcn_l (0.1720212 0.006875867 -0.06610607)
    Marker L.Toe.Med: calcn_l (0.1870747 0.006965991 0.02412908)
    Marker L.Toe.Tip: calcn_l (0.2305258 0.008010847 0.001778272)
